folder simulations: version=37; creator=Apsim 7.9-r4044
  simulation barley1_factorial
    metfile met
      filename=C:/GoogleDrive/BarleyLab/Breeding/EnvironmentalData/GrowthStaging/MetFiles/S2_MET_STP16.met
    clock
      start_date = 01/01/2016  # Enter the start date of the simulation
      end_date = 31/12/2016  # Enter the end date of the simulation
    summaryfile
    area paddock
      fertiliser
      folder Manager folder
        manager2 Crop Management
          # Crop properties
          crop = barley  # Name of this crop
          # Sowing criteria
          date1 = 04-may  # Enter sowing window START date (dd-mmm)
          date3 = na  # Enter cultivar change date (na if not in use)
          date2 = 04-may  # Enter sowing window END date (dd-mmm)
          must_sow = yes
          rain_amount = 25  # Enter amount of cumulative rainfall (mm)
          rain_days = 7  # Enter number of days to accumulate rainfall (days)
          esw_amount = 100  # Enter amount of soil water (mm)
          # Sowing Parameters
          cultivar1 = barque  # Enter cultivar
          cultivar2 = na  # Enter 2nd Cultivar (na if not using a second cultivar)
          density1 = 300  # Enter sowing density (plants/m2)
          depth1 = 30  # Enter sowing depth (mm)
          row_spacing1 = 250  # Enter row spacing (mm)
          # Extra Parameters
          ftn1 = na  # Enter Fertile Tiller Number (na for auto)
          skiprow1 = solid  # Skip row
          tillageImplement = na  # Name of tillage implement (na if not in use)
```csharp
using System;
using ModelFramework;
using CSGeneral;

// Basic crop management: sowing & harvesting.
// Multi-paddock aware.
// This component DOES NOT require a trigger from the sequencer.
// It will assume it is the only crop in the system if it doesnt find a sequencer.
// If it does find a sequencer, it will do nothing until told to (via Enter/Leave).
public class Script 
{      
   [Link()]  public Simulation MySimulation;
   
   [Param()] private string crop;         // The module name of this crop
   [Param()] private string date1;         //Start of sowing window
   [Param()] private string date2;         //End of sowing window
   [Param()] private string date3;         //date to change to different cultivar
   [Param()] int esw_amount;
   [Param()] private string must_sow;

   [Input()] private DateTime today;

   // Rainfall accumulator
   [Param()] int rain_days;              //check for rain over this period
   [Param()] int rain_amount;            //this much rain over that period

   // Daily rainfall from the system
   [Input] private double rain;
   private ManagerUtility.Tracker<double> rainTracker; 

   private bool inWindow = false;
   private bool endOfWindow = false;
   private bool ChangeCultivar = false;

   //initialise tracker, telling it how many days to track
   [EventHandler] public void OnInitialised()
   {
      rainTracker = new ManagerUtility.Tracker<double>(rain_days); 
   }

   // Daily tests common to all paddocks
   [EventHandler] public void OnPrepare()
   {
      bool startOfWindow = DateUtility.DatesEqual(date1, today);

      inWindow = DateUtility.WithinDates(date1, today, date2);
      ChangeCultivar = false;
      if(date3 != "na")  
         ChangeCultivar = DateUtility.WithinDates(date3, today, date2);
      endOfWindow = DateUtility.DatesEqual(date2, today);

      rainTracker.Add(rain);
      string currentPaddock = "";
      if (MySimulation.Get("currentPaddock", out currentPaddock) == false) 
      {
         // If there is no sequencer plugged in then we are it..
         if (canEnter > 0) {
            OnEnter();
         }
         if (canLeave > 0) {
            OnLeave();
         }
      }
   }
   // Test whether we can sow a crop today
   // +ve number - yes
   // 0          - no
   // -ve number - no, out of scope (planting window)
   [Output, Description("Test whether we can sow a crop today")] public int canEnter  {
      get {
         bool isPossibleToday = false;
         
         string currentPaddock;
         MySimulation.Get("currentPaddock", out currentPaddock);
         //Console.WriteLine("1. '" + currentPaddock + "'");

         Component paddockModule;
         if (currentPaddock != "")
            paddockModule = (Component) MySimulation.LinkByName(currentPaddock);
         else
            paddockModule = (Component) MySimulation.ChildPaddocks[0];
         //Console.WriteLine("2. " + paddockModule.Name);

         Component cropModule = (Component) paddockModule.LinkByName( crop );

         //Console.WriteLine("3. " + cropModule.Name);
         string plantStatus = "";
         cropModule.Get("plant_status", out plantStatus);

         double esw = 0.0;
         Component soilModule = (Component) paddockModule.LinkByType("SoilWat");
         soilModule.Get("esw", out esw);
         if (plantStatus == "out" &&
             inWindow &&
             rainTracker.Sum() >= rain_amount &&
             esw > esw_amount) 
         {
             isPossibleToday = true;
         } 

	     if (isPossibleToday)
            return 1;
         
         if (plantStatus == "out" && endOfWindow && must_sow == "yes")
            return 1;

         if (plantStatus == "out" && !inWindow)
            return -1;
         
         return 0;
      }
   }  
   
   
   // Sow a crop
   [Param()] private string cultivar1;
   [Param()] private string cultivar2;
   [Param()] private double density1;
   [Param()] private double depth1;
   [Param()] private double row_spacing1;
   [Param()] private string ftn1;
   [Param()] private string skiprow1;
   [Param()] private string tillageImplement;
   
   [EventHandler, Description("Sow the crop")] public void OnEnter()
   {
      Console.WriteLine(today + " Sowing Crop");
      SowType data = new SowType();
      data.Cultivar = cultivar1;
      if(ChangeCultivar)
         data.Cultivar = cultivar2;

      data.plants = density1;
      data.sowing_depth = depth1;
      data.row_spacing = row_spacing1;
      data.tiller_no_fertile = (ftn1 == "na") ? "" : ftn1;
      data.SkipRow = 0 ;
      if (skiprow1 == "single")
         data.SkipRow = 1;
      else if (skiprow1 == "double")
         data.SkipRow = 2;

      string currentPaddock;
      MySimulation.Get("currentPaddock", out currentPaddock);
      Component cropModule;
      if (currentPaddock != "")
         cropModule = (Component) MySimulation.LinkByName(currentPaddock + "." + crop);
      else 
         cropModule = (Component) MySimulation.ChildPaddocks[0].LinkByName(crop);

      cropModule.Publish("Sow", data);

      if (tillageImplement.ToLower() != "na") 
	  {
         TillageType t = new TillageType();
         t.type = tillageImplement;
         Component paddockModule;
         if (currentPaddock != "")
            paddockModule = (Component) MySimulation.LinkByName(currentPaddock);
         else
            paddockModule = MySimulation.ChildPaddocks[0];
         paddockModule.Publish("tillage", t);
      }		 
   }

   // Test whether we can harvest a crop today
   // +ve number - yes
   // 0          - no
   // -ve        - out of scope
   [Output] public int canLeave  
   {
      get 
      {
         string currentPaddock;
         MySimulation.Get("currentPaddock", out currentPaddock);

         string plantStatus = "";
         MySimulation.Get((currentPaddock != "" ? currentPaddock + "." : "") + crop + ".plant_status", out plantStatus);
         if (plantStatus == "out")
            return -1;

         string StageName = "";
         MySimulation.Get((currentPaddock != "" ? currentPaddock + "." : "") + crop + ".StageName", out StageName);
         if (StageName == "harvest_ripe" || plantStatus == "dead")
            return 1;
         return 0;
      }
   }

   [EventHandler] public void OnLeave()
   {
      Console.WriteLine(today + " Harvesting Crop");
      HarvestType hdata = new HarvestType();
      hdata.Remove = 0.0;
      string currentPaddock;
      MySimulation.Get("currentPaddock", out currentPaddock);
      Component cropModule;
      if (currentPaddock != "")
         cropModule = (Component) MySimulation.LinkByName(currentPaddock + "." + crop);
      else 
         cropModule = (Component) MySimulation.ChildPaddocks[0].LinkByName(crop);

      cropModule.Publish("harvest", hdata);

      KillCropType kdata = new KillCropType();
      kdata.KillFraction = 0.0F;
      cropModule.Publish("killcrop", kdata);
      cropModule.Publish("end_crop");
   } 
}
```
        manager2 Fertilise at Sowing
          # When should fertiliser be applied
          ModuleName = barley  # On which module should the event come from
          EventName = sowing  # On which event should spraying be triggered
          # Event details
          fertType = urea_N  # The type of fertiliser
          fertAmt = 150  # Amount of fertiliser to apply (kg/ha)
```csharp
using System;
using System.Linq;
using System.Collections.Generic;
using ModelFramework;

// Crop management: fertilise at sowing
// Multi-paddock aware.
// This component DOES NOT require a trigger from the sequencer.

public class Script 
{      
   [Link]  public Simulation MySimulation;
   [Param] string fertType;
   [Param] float fertAmt;
   [Param] string ModuleName;
   [Param] string EventName;
   
   [EventHandler] public void OnStart_Simulation()
   {
      foreach (Paddock paddock in MySimulation.ChildPaddocks) 
      {
         foreach (Component child in paddock.Children) {
            if(child.Name == ModuleName){
               RuntimeEventHandler.NullFunction curried = () => OnTrigger(paddock.Name);
               MySimulation.Subscribe(child.FullName + "." + EventName, curried);
               //Console.WriteLine("Subscribed '" + child.FullName + "." + EventName + " => " + paddock.Name + "'"); 
            }
         }
      }
   }

   public void OnTrigger(string paddock)
   {
      Console.WriteLine("Fertiliser OnTrigger called, paddock='" + paddock + "'"); 
      if (fertAmt > 0) 
      {         
         Component paddockModule;
         if (paddock != "")
            paddockModule = (Component) MySimulation.LinkByName(paddock);
         else
            paddockModule = (Component) MySimulation.ChildPaddocks[0];
         //Console.WriteLine("2. " + paddockModule.Name);

         Fertiliser fertModule = (Fertiliser) paddockModule.LinkByName("Fertiliser");
         fertModule.Apply(fertAmt, 50, fertType);
      }
   }
}
```
      outputfile: filename=barley1_factorial.out; title=barley1_factorial
        variables
          variables: dd/mm/yyyy as Date, day, year, yield, zadok_stage, grain_protein, sowing_das, emergence_das, end_of_juvenile_das, floral_initiation_das, flowering_das, start_grain_fill_das, end_grain_fill_das, maturity_das, eo, TT, MaxT, MinT
        events Reporting Frequency: event=end_day
      barley
        ModifyKL = yes  # Modify KL using CL, EC or ESP if found?
        MaxRootDepth = 0  # Maximum rooting depth (mm) 0=no restriction
      Soil Heavy Clay: SoilType=Generic Vertosol; Site=Generic; NearestTown=Toowoomba; Region=Darling Downs and Granite Belt; State=Queensland; Country=Australia; Latitude=-27.564333; Longitude=151.953991; LocationAccuracy=Regional Soil Type; YearOfSampling=0; DataSource=YP. A Peake-CSIRO Sustainable Ecosystems, Toowoomba; Comments=Generic soil developed by Allan Peake.
        Water
          Thickness  BD    AirDry  LL15  DUL   SAT
          150        1.05  0.135   0.27  0.51  0.574
          150        1.08  0.196   0.28  0.5   0.562
          300        1.12  0.232   0.29  0.49  0.547
          300        1.15  0.27    0.3   0.48  0.536
          300        1.18  0.279   0.31  0.47  0.525
          300        1.21  0.288   0.32  0.46  0.513
          300        1.25  0.297   0.33  0.45  0.498
          SoilCrop wheat: LL=[0.27, 0.28, 0.29, 0.3, 0.31, 0.32, 0.33]; KL=[0.06, 0.06, 0.04, 0.04, 0.04, 0.02, 0.02]; XF=[1, 1, 1, 1, 1, 1, 1]
          SoilCrop sorghum: LL=[0.27, 0.28, 0.29, 0.3, 0.31, 0.32, 0.33]; KL=[0.07, 0.07, 0.07, 0.05, 0.04, 0.03, 0.02]; XF=[1, 1, 1, 1, 1, 1, 1]
          SoilCrop barley: LL=[0.29, 0.29, 0.32, 0.38, 0.39, 0.39, 0.41]; KL=[0.1, 0.1, 0.08, 0.06, 0.04, 0.02, 0.01]; XF=[1, 1, 1, 1, 1, 1, 1]
        SoilWater: SummerCona=3.5; SummerU=6; SummerDate=1-Nov; WinterCona=2.5; WinterU=4; WinterDate=1-apr; DiffusConst=40; DiffusSlope=16; Salb=0.13; CN2Bare=73; CNRed=20; CNCov=0.8; Thickness=[150, 150, 300, 300, 300, 300, 300]; SWCON=[0.3, 0.3, 0.3, 0.3, 0.3, 0.3, 0.3]
        SoilOrganicMatter: RootCN=40; RootWt=1000; SoilCN=12; EnrACoeff=7.4; EnrBCoeff=0.2; OCUnits=Total
          Thickness  OC    FBiom  FInert
          150        1     0.02   0.4
          150        0.5   0.02   0.6
          300        0.25  0.01   0.8
          300        0.2   0.01   0.9
          300        0.1   0.01   1
          300        0.1   0.01   1
          300        0.1   0.01   1
        Analysis: PHUnits=Water; BoronUnits=HotWater
          Thickness  EC   PH   CL   ESP
          150        0.1  8.5  20   1
          150        0.2  8.7  40   2
          300        0.2  8.5  70   3
          300        0.3  8    110  5
          300        0.4  7    160  8
          300        0.5  6    220  12
          300        0.6  5    300  15
        InitialWater: FractionFull=1; PercentMethod=FilledFromTop
        Sample Initial nitrogen: Thickness=[100]; NO3=[0]; NH4=[0]; SW=[0]; NO3Units=ppm; NH4Units=ppm; SWUnits=Volumetric; OCUnits=Total; PHUnits=Water
  factorial Factorials: active=1
    settings: fn=1
    factor
      targets
        Target=[/simulations/barley1_factorial/paddock/Manager folder/Crop Management, /simulations/barley1_factorial/met]
      vars
        cultivar1=barque, bass, baudin, Buloke, capstan, Cask, commander, compass, Dash, Excel, Fathom, FlagShip, Flinders, franklin, gairdner, gairdner_TAS, Grange, Grimmett, hamelin, Henley, hindmarsh, keel, Koru, LaTrobe, Litmus, Mackay, maritime, Navigator, oxford, schooner, Scope, skiff, Skipper, sloop, SYRattler, Triumph, Valetta, Vlaming, Westminster, Wimmera, yagen
      manager2 Crop Management: same as barley1_factorial.paddock.Manager folder.Crop Management
